// SBML level 3 version 2

model main()
  // model units - substance: mole, time: second, extent: mole

  // Compartments:
  compartment c = 1 litre;

  // Species:
  species I in c = 0.005/c;
  species R in c = 0;
  species M in c = 1.5/c;
  species P in c = 0;
  species PD in c = 0;

  // Parameters:
  kp = 1;
  kp_kt_ratio = 1;
  kd_kt = 1;
  Kr = 1;
  f = 0.5;

  // Assignment rules:
  kt := kp/kp_kt_ratio;
  kd := kd_kt/kt;
  kdp := Kr*kp;

  // Reactions:
  initiation: I => R; kd*I*c;
  init_prop: R + M => P; kp*R*M*c;
  prop: P + M => P; kp*P*M*c;
  deprop: P => P + M; kdp*P*c;
  term: 2 P => PD; kt*P*P*c;

  // Unit definitions:
  unit per_second = 1 / second;
end
