// SBML level 3 version 2

model main()
  // model units - substance: mole, time: second, extent: mole

  // Compartments:
  compartment c = 1 litre;

  // Species:
  species I in c = 0.005/c;
  species R in c = 0;
  species A in c = 1.5/c;
  species B in c = 1.5/c;
  species RA in c = 0;
  species RB in c = 0;
  species PAA in c = 0;
  species PAB in c = 0;
  species PBA in c = 0;
  species PBB in c = 0;
  species PA in c;
  species PB in c;
  species PD in c = 0;

  // Parameters:
  kpAA = 1;
  rA = 1;
  rB = 1;
  rX = 1;
  KAA = 0;
  KAB = 0;
  KBA = 0;
  KBB = 0;
  kt = 0;
  kd = 3e-6;
  f = 0.5;

  // Assignment rules:
  kpAB := kpAA/rA;
  kpBB := kpAA/rX;
  kpBA := kpBB/rB;
  kdAA := kpAA*KAA;
  kdAB := kpAB*KAB;
  kdBA := kpBA*KBA;
  kdBB := kpBB*KBB;
  PA := PAA + PBA;
  PB := PAB + PBB;
  fPAA := (PAA + 1e-10)/(PA + 1e-10);
  fPAB := (PAB + 1e-10)/(PB + 1e-10);
  fPBA := (PBA + 1e-10)/(PA + 1e-10);
  fPBB := (PBB + 1e-10)/(PB + 1e-10);

  // Reactions:
  initiation: I => R; kd*f*I*c;
  prop_A: R + A => RA; kpAA*R*A*c;
  prop_B: R + B => RB; kpBB*R*B*c;
  prop_RA_A: RA + A => PAA; kpAA*RA*A*c;
  prop_RA_B: RA + B => PAB; kpAB*RA*B*c;
  prop_RB_A: RB + A => PBA; kpBA*RB*A*c;
  prop_RB_B: RB + B => PBB; kpBB*RB*B*c;
  prop_PAA_A: PAA + A => PAA; kpAA*PAA*A*c;
  prop_PAA_B: PAA + B => PAB; kpAB*PAA*B*c;
  prop_PAB_A: PAB + A => PBA; kpBA*PAB*A*c;
  prop_PAB_B: PAB + B => PBB; kpBB*PAB*B*c;
  prop_PBA_A: PBA + A => PAA; kpAA*PBA*A*c;
  prop_PBA_B: PBA + B => PAB; kpAB*PBA*B*c;
  prop_PBB_A: PBB + A => PBA; kpBA*PBB*A*c;
  prop_PBB_B: PBB + B => PBB; kpBB*PBB*B*c;
  deprop_PAAA: PAA => PAA + A; kdAA*fPAA*PAA*c;
  deprop_PBAA: PAA => PBA + A; kdAA*fPBA*PAA*c;
  deprop_PABA: PBA => PAB + A; kdBA*fPAB*PBA*c;
  deprop_PBBA: PBA => PBB + A; kdBA*fPBB*PBA*c;
  deprop_PAAB: PAB => PAA + B; kdAB*fPAA*PAB*c;
  deprop_PBAB: PAB => PBA + B; kdAB*fPBA*PAB*c;
  deprop_PABB: PBB => PAB + B; kdBB*fPAB*PBB*c;
  deprop_PBBB: PBB => PBB + B; kdBB*fPBB*PBB*c;
  term_PAA_PAA: PAA => PD; 2*kt*PAA*PAA*c;
  term_PAA_PAB: PAA + PAB => PD; 4*kt*PAA*PAB*c;
  term_PAA_PBA: PAA + PBA => PD; 4*kt*PAA*PBA*c;
  term_PAA_PBB: PAA + PBB => PD; 4*kt*PAA*PBB*c;
  term_PAB_PAB: PAB => PD; 2*kt*PAB*PAB*c;
  term_PAB_PBA: PAB + PBA => PD; 4*kt*PAB*PBA*c;
  term_PAB_PBB: PAB + PBB => PD; 4*kt*PAB*PBB*c;
  term_PBA_PBA: PBA => PD; 2*kt*PBA*PBA*c;
  term_PBA_PBB: PBA + PBB => PD; 4*kt*PBA*PBB*c;
  term_PBB_PBB: PBB => PD; 2*kt*PBB*PBB*c;

  // Unit definitions:
  unit per_second = 1 / second;
end
