// SBML level 3 version 2

model main()
  // model units - substance: mole, time: second, extent: mole

  // Compartments:
  compartment c = 1 litre;

  // Species:
  species I in c = 0;
  species R in c = 0.005/c;
  species A in c = 1.5/c;
  species B in c = 1.5/c;
  species C in c = 1.5/c;
  species RA in c = 0;
  species RB in c = 0;
  species RC in c = 0;
  species PAA in c = 0;
  species PAB in c = 0;
  species PAC in c = 0;
  species PBA in c = 0;
  species PBB in c = 0;
  species PBC in c = 0;
  species PCA in c = 0;
  species PCB in c = 0;
  species PCC in c = 0;

  // Parameters:
  kd = 10000000000;
  f = 0.5;
  kpAA = 1;
  rAB = 1;
  rAC = 1;
  rBA = 1;
  rBC = 1;
  rCA = 1;
  rCB = 1;
  rAxB = 1;
  rAxC = 1;

  // Assignment rules:
  kpBB := kpAA/rAxB;
  kpCC := kpAA/rAxC;
  kpAB := kpAA/rAB;
  kpAC := kpAA/rAC;
  kpBA := kpBB/rBA;
  kpBC := kpBB/rBC;
  kpCA := kpCC/rCA;
  kpCB := kpCC/rCB;

  // Reactions:
  initiation: I => R; kd*I*c;
  prop_A: R + A => RA; kpAA*R*A*c;
  prop_B: R + B => RB; kpBB*R*B*c;
  prop_C: R + C => RC; kpCC*R*C*c;
  prop_RA_A: RA + A => PAA; kpAA*RA*A*c;
  prop_RA_B: RA + B => PAB; kpAB*RA*B*c;
  prop_RA_C: RA + C => PAC; kpAC*RA*C*c;
  prop_RB_A: RB + A => PBA; kpBA*RB*A*c;
  prop_RB_B: RB + B => PBB; kpBB*RB*B*c;
  prop_RB_C: RB + C => PBC; kpBC*RB*C*c;
  prop_RC_A: RC + A => PCA; kpCA*RC*A*c;
  prop_RC_B: RC + B => PCB; kpCB*RC*B*c;
  prop_RC_C: RC + C => PCC; kpCC*RC*C*c;
  prop_PAA_A: PAA + A => PAA; kpAA*PAA*A*c;
  prop_PAA_B: PAA + B => PAB; kpAB*PAA*B*c;
  prop_PAA_C: PAA + C => PAC; kpAC*PAA*C*c;
  prop_PAB_A: PAB + A => PBA; kpBA*PAB*A*c;
  prop_PAB_B: PAB + B => PBB; kpBB*PAB*B*c;
  prop_PAB_C: PAB + C => PBC; kpBC*PAB*C*c;
  prop_PAC_A: PAC + A => PCA; kpCA*PAC*A*c;
  prop_PAC_B: PAC + B => PCB; kpCB*PAC*B*c;
  prop_PAC_C: PAC + C => PCC; kpCC*PAC*C*c;
  prop_PBA_A: PBA + A => PAA; kpAA*PBA*A*c;
  prop_PBA_B: PBA + B => PAB; kpAB*PBA*B*c;
  prop_PBA_C: PBA + C => PAC; kpAC*PBA*C*c;
  prop_PBB_A: PBB + A => PBA; kpBA*PBB*A*c;
  prop_PBB_B: PBB + B => PBB; kpBB*PBB*B*c;
  prop_PBB_C: PBB + C => PBC; kpBC*PBB*C*c;
  prop_PBC_A: PBC + A => PCA; kpCA*PBC*A*c;
  prop_PBC_B: PBC + B => PCB; kpCB*PBC*B*c;
  prop_PBC_C: PBC + C => PCC; kpCC*PBC*C*c;
  prop_PCA_A: PCA + A => PAA; kpAA*PCA*A*c;
  prop_PCA_B: PCA + B => PAB; kpAB*PCA*B*c;
  prop_PCA_C: PCA + C => PAC; kpAC*PCA*C*c;
  prop_PCB_A: PCB + A => PBA; kpBA*PCB*A*c;
  prop_PCB_B: PCB + B => PBB; kpBB*PCB*B*c;
  prop_PCB_C: PCB + C => PBC; kpBC*PCB*C*c;
  prop_PCC_A: PCC + A => PCA; kpCA*PCC*A*c;
  prop_PCC_B: PCC + B => PCB; kpCB*PCC*B*c;
  prop_PCC_C: PCC + C => PCC; kpCC*PCC*C*c;

  // Unit definitions:
  unit per_second = 1 / second;
end
