// SBML level 3 version 2

model main()
  // model units - substance: mole, time: second, extent: mole

  // Compartments:
  compartment c = 1 litre;

  // Species:
  species R in c = 0;
  species A in c = 0;
  species B in c = 0;
  species RA in c = 0;
  species RB in c = 0;
  species PAA in c = 0;
  species PAB in c = 0;
  species PBA in c = 0;
  species PBB in c = 0;
  species PA in c;
  species PB in c;

  // Parameters:
  kpAA = 1;
  rA = 1;
  rB = 1;
  rX = 1;
  KAA = 0;
  KAB = 0;
  KBA = 0;
  KBB = 0;
  A0 = A;
  B0 = B;

  // Assignment rules:
  kpAB := kpAA/rA;
  kpBB := kpAA/rX;
  kpBA := kpBB/rB;
  kdAA := kpAA*KAA;
  kdAB := kpAB*KAB;
  kdBA := kpBA*KBA;
  kdBB := kpBB*KBB;
  xA := 1 - A/A0;
  xB := 1 - B/B0;
  PA := PAA + PBA;
  PB := PAB + PBB;
  fPAA := (PAA + 1e-10)/(PA + 1e-10);
  fPAB := (PAB + 1e-10)/(PB + 1e-10);
  fPBA := (PBA + 1e-10)/(PA + 1e-10);
  fPBB := (PBB + 1e-10)/(PB + 1e-10);

  // Reactions:
  prop_A: R + A => RA; kpAA*R*A*c;
  prop_B: R + B => RB; kpBB*R*B*c;
  prop_RA_A: RA + A => PAA; kpAA*RA*A*c;
  prop_RA_B: RA + B => PAB; kpAB*RA*B*c;
  prop_RB_A: RB + A => PBA; kpBA*RB*A*c;
  prop_RB_B: RB + B => PBB; kpBB*RB*B*c;
  prop_PAA_A: PAA + A => PAA; kpAA*PAA*A*c;
  prop_PAA_B: PAA + B => PAB; kpAB*PAA*B*c;
  prop_PAB_A: PAB + A => PBA; kpBA*PAB*A*c;
  prop_PAB_B: PAB + B => PBB; kpBB*PAB*B*c;
  prop_PBA_A: PBA + A => PAA; kpAA*PBA*A*c;
  prop_PBA_B: PBA + B => PAB; kpAB*PBA*B*c;
  prop_PBB_A: PBB + A => PBA; kpBA*PBB*A*c;
  prop_PBB_B: PBB + B => PBB; kpBB*PBB*B*c;
  deprop_PAAA: PAA => PAA + A; kdAA*fPAA*PAA*c;
  deprop_PBAA: PAA => PBA + A; kdAA*fPBA*PAA*c;
  deprop_PABA: PBA => PAB + A; kdBA*fPAB*PBA*c;
  deprop_PBBA: PBA => PBB + A; kdBA*fPBB*PBA*c;
  deprop_PAAB: PAB => PAA + B; kdAB*fPAA*PAB*c;
  deprop_PBAB: PAB => PBA + B; kdAB*fPBA*PAB*c;
  deprop_PABB: PBB => PAB + B; kdBB*fPAB*PBB*c;
  deprop_PBBB: PBB => PBB + B; kdBB*fPBB*PBB*c;

  // Unit definitions:
  unit per_second = 1 / second;
end
