// SBML level 3 version 2

model main()
  // model units - substance: mole, time: second, extent: mole

  // Compartments:
  compartment c = 1 litre;

  // Species:
  species I in c = 0.005/c;
  species R in c = 0;
  species A in c = 1.5/c;
  species B in c = 1.5/c;
  species RA in c = 0;
  species RB in c = 0;
  species PAA in c = 0;
  species PAB in c = 0;
  species PBA in c = 0;
  species PBB in c = 0;
  species PA in c;
  species PB in c;

  // Parameters:
  kd = 10000000000;
  f = 0.5;
  kpAA = 2;
  kpAB = 2;
  kpBA = 2;
  kpBB = 2;

  // Assignment rules:
  PA := PAA + PBA + 1e-10;
  PB := PAB + PBB + 1e-10;
  fPAA := PAA/PA;
  fPAB := PAB/PB;
  fPBA := PBA/PA;
  fPBB := PBB/PB;

  // Reactions:
  initiation: I => R; kd*I*c;
  prop_A: R + A => RA; kpAA*R*A*c;
  prop_B: R + B => RB; kpBB*R*B*c;
  prop_RA_A: RA + A => PAA; kpAA*RA*A*c;
  prop_RA_B: RA + B => PAB; kpAB*RA*B*c;
  prop_RB_A: RB + A => PBA; kpBA*RB*A*c;
  prop_RB_B: RB + B => PBB; kpBB*RB*B*c;
  prop_PAA_A: PAA + A => PAA; kpAA*PAA*A*c;
  prop_PAA_B: PAA + B => PAB; kpAB*PAA*B*c;
  prop_PAB_A: PAB + A => PBA; kpBA*PAB*A*c;
  prop_PAB_B: PAB + B => PBB; kpBB*PAB*B*c;
  prop_PBA_A: PBA + A => PAA; kpAA*PBA*A*c;
  prop_PBA_B: PBA + B => PAB; kpAB*PBA*B*c;
  prop_PBB_A: PBB + A => PBA; kpBA*PBB*A*c;
  prop_PBB_B: PBB + B => PBB; kpBB*PBB*B*c;

  // Unit definitions:
  unit per_second = 1 / second;
end
