// SBML level 2 version 4

model ode_model()
  // ODE Model

  // Compartments:
  compartment compartment = 1;

  // Species:
  species I in compartment = 0;
  species R in compartment = 0;
  species A in compartment = 0;
  species B in compartment = 0;
  species RA in compartment = 0;
  species RB in compartment = 0;
  species PAA in compartment = 0;
  species PAB in compartment = 0;
  species PBA in compartment = 0;
  species PBB in compartment = 0;
  species PD in compartment = 0;
  species PA in compartment;
  species PB in compartment;

  // Parameters:
  kd = 0;
  f = 0;
  kpRA = 0;
  kpRB = 0;
  kpAA = 0;
  kpBA = 0;
  kpAB = 0;
  kpBB = 0;
  kdAA = 0;
  kdBA = 0;
  kdAB = 0;
  kdBB = 0;
  ktAA = 0;
  ktAB = 0;
  ktBB = 0;
  ktcAA = 0;
  ktcAB = 0;
  ktcBB = 0;
  ktdAA = 0;
  ktdAB = 0;
  ktdBB = 0;

  // Assignment rules:
  PA := PAA + PBA + 1e-40;
  PB := PAB + PBB + 1e-40;
  fPAA := PAA/PA;
  fPBA := PBA/PA;
  fPAB := PAB/PB;
  fPBB := PBB/PB;

  // Reactions:
  PAA_p_PAA: PAA + A => PAA; compartment*kPAA*PAA*A;
  PAA_dp_PAA: PAA => PAA + A; compartment*fPAA*kdAA*PAA;

  // Unit definitions:
  unit volume = 1e-3 litre;
  unit substance = 1e-3 mole;
end
