// SBML level 3 version 2

model main()
  // model units - substance: mole, time: second, extent: mole

  // Compartments:
  compartment c1 = 1 litre;

  // Species:
  species I in c1 = 0;
  species R in c1 = 0;
  species A in c1 = 0;
  species B in c1 = 0;
  species RA in c1 = 0;
  species RB in c1 = 0;
  species PAA in c1 = 0;
  species PAB in c1 = 0;
  species PBA in c1 = 0;
  species PBB in c1 = 0;
  species PA in c1 = 0;
  species PB in c1 = 0;
  species fPAA in c1 = 0;
  species fPAB in c1 = 0;
  species fPBA in c1 = 0;
  species fPBB in c1 = 0;

  // Parameters:
  kd = 0 per_second;
  kpAA = 0 per_second;
  kpAB = 0 per_second;
  kpBA = 0 per_second;
  kpBB = 0 per_second;
  kdAA = 0 per_second;
  kdAB = 0 per_second;
  kdBA = 0 per_second;
  kdBB = 0 per_second;

  // Reactions:
  initiation: I => R; kd*I*c1;
  prop_A: R + A => RA; kpAA*R*A*c1;
  prop_B: R + B => RB; kpBB*R*B*c1;
  prop_RA_A: RA + A => PAA; kpAA*RA*A*c1;
  prop_RA_B: RA + B => PAB; kpAB*RA*B*c1;
  prop_RB_A: RB + A => PBA; kpBA*RB*A*c1;
  prop_RB_B: RB + B => PBB; kpBB*RB*B*c1;
  prop_PAA_A: PAA + A => PAA; kpAA*PAA*A*c1;
  prop_PAA_B: PAA + B => PAB; kpAB*PAA*B*c1;
  prop_PAB_A: PAB + A => PBA; kpBA*PAB*A*c1;
  prop_PAB_B: PAB + B => PBB; kpBB*PAB*B*c1;
  prop_PBA_A: PBA + A => PAA; kpAA*PBA*A*c1;
  prop_PBA_B: PBA + B => PAB; kpAB*PBA*B*c1;
  prop_PBB_A: PBB + A => PBA; kpBA*PBB*A*c1;
  prop_PBB_B: PBB + B => PBB; kpBB*PBB*B*c1;

  // Unit definitions:
  unit per_second = 1 / second;
end
